# ====================================================================
# LAMMPS Input Script: Uniaxial Tensile Deformation
# Description: Applies constant true strain rate deformation to an
# equilibrated polymer system using an NPT ensemble.
# ====================================================================

#------- input_variables --------

echo        screen
variable    strain equal 0.1
variable    strvar equal v_strain*100
variable    strain_rate_s equal 1e8 # in 1/s
variable    mytimestep equal 0.1

# Strain direction (x = 1, y = 2, z = 3)
variable    dir equal 1 # CHANGE
variable    rep equal 1 # CHANGE
variable    phase string crystalline

if "${dir} == 1" then &
  "variable myid string ${phase}_seed${rep}_tension_X"

if "${dir} == 2" then &
  "variable     myid string ${phase}_seed${rep}_tension_Y"

if "${dir} == 3" then &
  "variable     myid string ${phase}_seed${rep}_tension_Z"

#-------- initialization --------

units           real
dimension       3
boundary        p p p
newton          on
atom_style      full

#---- calculated_variables ------

variable        strain_rate_fs equal ${strain_rate_s}*1e-15 # in 1/fs
variable        totaltime equal ${strain}/${strain_rate_fs} # total time in femtoseconds
variable        steps equal ${totaltime}/dt
variable        eeng equal time*${strain_rate_fs}
variable        etrue equal ln(1+v_eeng)
variable        tps equal time/1000

#--------- force_field --------

bond_style      class2 # IFF
angle_style     class2
dihedral_style  class2
improper_style class2
special_bonds   lj/coul 0 0 1
kspace_style    pppm 1.0e-4
pair_style      lj/class2/coul/long 10.0 # IFF
pair_modify     mix sixthpower

read_data       ${phase}_seed${rep}_equilibrated.data # INPUT: Insert your parameterized LAMMPS data file here

neighbor        3.0 bin
neigh_modify    every 1 delay 0 check yes

#----------- fixes ------------

if "${dir} == 1" then &
  "fix          1 all npt temp 300 300 100 y 1 1 1000 z 1 1 1000" &
  "fix          2 all deform 1 x erate ${strain_rate_fs}"

if "${dir} == 2" then &
  "fix          1 all npt temp 300 300 100 x 1 1 1000 z 1 1 1000" &
  "fix          2 all deform 1 y erate ${strain_rate_fs}"

if "${dir} == 3" then &
  "fix          1 all npt temp 300 300 100 x 1 1 1000 y 1 1 1000" &
  "fix          2 all deform 1 z erate ${strain_rate_fs}"

#----- calculate_strains --------

variable        tmp equal lx
variable        lx0 equal ${tmp}
variable        tmp equal ly
variable        ly0 equal ${tmp}
variable        tmp equal lz
variable        lz0 equal ${tmp}
variable        eengx equal (lx-${lx0})/${lx0}
variable        eengy equal (ly-${ly0})/${ly0}
variable        eengz equal (lz-${lz0})/${lz0}
variable        etruex equal ln(1+v_eengx)
variable        etruey equal ln(1+v_eengy)
variable        etruez equal ln(1+v_eengz)

#----- calculate_stresses -------

compute         p all pressure thermo_temp
variable        sxx equal -0.101325*c_p[1] #in MPa
variable        syy equal -0.101325*c_p[2] #in MPa
variable        szz equal -0.101325*c_p[3] #in MPa
fix             sxx_ave all ave/time 1 2000 2000 v_sxx
fix             syy_ave all ave/time 1 2000 2000 v_syy
fix             szz_ave all ave/time 1 2000 2000 v_szz

#----------- outputs ----------

thermo_style    custom time v_tps step pe ke temp etotal evdwl press pxx pyy pzz v_etrue v_eengx v_eengy v_eengz v_sxx v_syy v_szz f_sxx_ave f_syy_ave f_szz_ave v_etruex v_etruey v_etruez lx ly lz v_dir vol density

thermo          2000
log           ${myid}.log

restart       100000 rst1.a.${myid} rst2.a.${myid}
dump         6 all atom 10000 dump.${myid} #every picosecond
dump_modify 6 scale no sort id

#----------- run -------------

timestep       ${mytimestep}
run           ${steps} #10000

#-------- wrap up ------------

write_restart   ${myid}.restart
write_data     ${myid}.data

#---------- end --------------
